finish
/clear, start
/cwd, 'C:\Users\eoinl\ThesisCode\Thesis\APDL\Mechanism'
! /input,01mechanismsprings,inp
/filname, final_state_element
!define vectors for sweeps
nsteps = 1 !number of steps in sweep


! define parameters
w = 5e-3        !width of beam
t1 = 0.4e-3     !thickness of thin flexure
t2 = 2.5e-3     !thickness of reinforced beam on bistable element
t3 = 2.5e-3     !thickness of reinforced beam on end-effector
BL1 = 4e-3      !length of thin flexure
BL2 = 24e-3     !length of reinforced beam on bistable element
h = 5e-3        !flexure spacing
sl = 6e-3       !support length
st = 2e-3       !support thickness
Lr1 = 35e-3     !length of reinforced beam on end-effector
L1 = 6e-3       !length of thin flexure on end-effector
beta1 = 0       !angle of thin flexure on bistable element
beta2 = 8       !angle of reinforced beam on bistable element
beta3 = 0       !angle of second thin flexure on bistable element
alpha = 22      !angle of reinforced beam on end-effector


!define vectors for sweeps
!Bl1
*dim, BL1_vec, array, nsteps
*vfill, BL1_vec,ramp,BL1, 0 !constant as no increment
!beta13
*dim, beta13_vec, array, nsteps
*vfill, beta13_vec,ramp,beta1, 0
!beta2
*dim, beta2_vec, array, nsteps
*vfill, beta2_vec,ramp,beta2,0
!BL2
*dim, BL2_vec, array, nsteps
*vfill, BL2_vec,ramp,BL2,0
!sl
*dim, sl_vec, array, nsteps
*vfill, sl_vec,ramp,sl,0
!alpha
*dim, alpha_vec, array, nsteps
*vfill, alpha_vec,ramp,alpha,1

zmax = 2*((BL1)*sin(beta1)+BL2*sin(beta2)+BL1*sin(beta3))

! alpha = asin(1-zmax/(2*(L1+Lr1)))  !angle of reinforced beam on end-effector
!alpha = 20*3.1416/180  !angle of reinforced beam on end-effector

/prep7
et, 1, beam188
keyopt, 1, 1, 1 ! Turn on large deflection
MP, EX, 1, 2.2E9  ! Young's modulus for material ID 1
MP, PRXY, 1, 0.3  ! Poisson's ratio for material ID 1
MP, DENS, 1, 1.1E3  ! Density for material ID 1
mptemp, 1, 0


MP, EX, 2, 200E12  ! Young's modulus for material ID 2
MP, PRXY, 2, 0.3  ! Poisson's ratio for material ID 2


et,2,link180,,1 !section assumed rigid with keyoption 2


! Loop over BL1 values and run analysis
*do, i, 1, nsteps
BL1 = BL1_vec(i)
beta1 = beta13_vec(i)*3.1416/180
beta3 = beta13_vec(i)*3.1416/180
beta2 = beta2_vec(i)*3.1416/180
BL2 = BL2_vec(i)
sl = sl_vec(i)
alpha = alpha_vec(i)*3.1416/180

dist = (Lr1+2*L1)*sin(alpha)

springlength = 3*dist-h/2
springarea = 1e-6
springk = 120
springe = springk*springlength/springarea

MP, EX, 3, springe  ! Young's modulus for material ID 3


!!!!!!!!!!!!!!!!!!!!!!!!!!!!
!!!!geometry setup  !!!!!!!!!
!!!!!!!!!!!!!!!!!!!!!!!!!!!!
/input, 02modelsetupsprings, inp


allsel
*get, numNodes, node, 0, count  ! Get number of nodes in model
*get, numElems, elem, 0, count  ! Get number of elements in model
!!!!!!!!!!!!!!!!!!!!!!!!!!!!
!!!!!!!!!! loads !!!!!!!!!!!
!!!!!!!!!!!!!!!!!!!!!!!!!!!!


/solu

antype, 0
nlgeom, on
eqslv, sparse
outres, all, all
autots, on
neqit, 50
deltim, 1e-3, 1e-6, 1e-2, on
! arclen, on

!define bcs
cmsel,s,id_fixed_nodes
d,all, all
allsel

cmsel,s,id_input_nodes
d,all,ux,1.9*dist
allsel

! d,id_disp,ux,0

solve
*get, n_steps1, active, 0, solu, ncmss
!! DISPLAY DEFORMED STATE !!
! time,2

! d,id_disp,ux,1.9*dist
! solve

/post1
/view, 1, 0, 0, 1
subset, last
plnsol,s,eqv


!!Render and save animation
antime,50,0.05
/anfile,save,results%i%,avi


!plotting final force displacement curve
/post26
nsol, 2, id_disp, u, x, displacement
rforce, 3, id_disp, F, x, force
xvar, 2
plvar, 3


!!!!!!!!!!!!!!!!!!!!!!!!!!!!
!!!  save plot .txt file !!!
!!!!!!!!!!!!!!!!!!!!!!!!!!!!


/input, scratch, gui

/post1

*DIM, maxStress, ARRAY, n_steps1, 1  ! Array to store max stress
*DIM, stress, ARRAY, numNodes, 1  ! Array to store stress at each node
*get, numNodes, node, 0, count  ! Get number of nodes in model


*enddo
